<?xml version="1.0"?>
<aerodynamics>
    <property value="1">coeffs/prop-c</property>
   <property value="-17">coeffs/pitch-dampening</property>
    <function name="aero/alpha-wing-deg">
		<todegrees>
			<property>aero/alpha-wing-rad</property>
		</todegrees>
	</function>

	<function name="aero/function/kCDge">
        <description>Change_in_drag_due_to_ground_effect</description>
        <table>
            <independentVar>aero/h_b-mac-ft</independentVar>
            <tableData>
                  0.0000    0.4800
                  0.1000    0.5150
                  0.1500    0.6290
                  0.2000    0.7090
                  0.3000    0.8150
                  0.4000    0.8820
                  0.5000    0.9280
                  0.6000    0.9620
                  0.7000    0.9880
                  0.8000    1.0000
                  0.9000    1.0000
                  1.0000    1.0000
                  1.1000    1.0000
              </tableData>
        </table>
    </function>

    <function name="aero/function/kCLge">
        <description>Change_in_lift_due_to_ground_effect</description>
        <table>
            <independentVar>aero/h_b-mac-ft</independentVar>
            <tableData>
                  0.0000    1.2030
                  0.1000    1.1270
                  0.1500    1.0900
                  0.2000    1.0730
                  0.3000    1.0460
                  0.4000    1.0280
                  0.5000    1.0190
                  0.6000    1.0130
                  0.7000    1.0080
                  0.8000    1.0060
                  0.9000    1.0030
                  1.0000    1.0020
                  1.1000    1.0000
              </tableData>
        </table>
    </function>


	<function name="aero/qbar-total-psf">
		<sum>
			<property>aero/qbar-psf</property>
			<product>
				<value>0.5</value>
				<property>atmosphere/rho-slugs_ft3</property>
				<pow>
					<property>propulsion/engine[0]/prop-induced-velocity_fps</property>
					<value>2</value>
				</pow>
			</product>
		</sum>
	</function>

    <axis name="LIFT">

        <function name="aero/force/Lift_alpha">
            <description>Lift due to alpha</description>
            <product>
                <property>aero/qbar-psf</property>
                <property>metrics/Sw-sqft</property>
                <property>aero/function/kCLge</property>
                <table>
                    <independentVar lookup="row">aero/alpha-rad</independentVar>
                    <tableData>
                        -0.20 -0.750
                        0.00 0.350
                        0.23 1.600
                        0.60 0.710
                    </tableData>
                </table>
                <value> 1.2 </value>
            </product>
        </function>

        <function name="aero/force/Lift_flap">
            <description>Delta Lift due to flaps</description>
            <product>
                <property>aero/qbar-psf</property>
                <property>metrics/Sw-sqft</property>
                <property>fcs/flap-pos-deg</property>
                <property>aero/function/kCLge</property>
                <value> 0.01333 </value>
            </product>
        </function>

        <function name="aero/force/Lift_speedbrake">
            <description>Delta Lift due to speedbrake</description>
            <product>
                <property>aero/qbar-psf</property>
                <property>metrics/Sw-sqft</property>
                <property>fcs/speedbrake-pos-norm</property>
                <value>0</value>
            </product>
        </function>

        <function name="aero/force/Lift_elevator">
            <description>Lift due to Elevator Deflection</description>
            <product>
                <property>aero/qbar-psf</property>
                <property>metrics/Sw-sqft</property>
                <property>fcs/elevator-pos-rad</property>
                <value>0.2</value>
            </product>
        </function>

    </axis>

    <axis name="DRAG">

        <function name="aero/force/Drag_basic">
            <description>Drag at zero lift</description>
            <product>
                <property>aero/qbar-psf</property>
                <property>metrics/Sw-sqft</property>
                <property>aero/function/kCDge</property>
                <table>
                    <independentVar lookup="row">aero/alpha-rad</independentVar>
                    <tableData>
                        -1.57 1.500
                        -0.26 0.031
                        0.00 0.024
                        0.26 0.031
                        1.57 1.500
                    </tableData>
                </table>
            </product>
        </function>

        <function name="aero/force/Drag_induced">
            <description>Induced drag</description>
            <product>
                <property>aero/qbar-psf</property>
                <property>metrics/Sw-sqft</property>
                <property>aero/cl-squared</property>
                <value>0.04</value>
            </product>
        </function>

        <function name="aero/force/Drag_mach">
            <description>Drag due to mach</description>
            <product>
                <property>aero/qbar-psf</property>
                <property>metrics/Sw-sqft</property>
                <table>
                    <independentVar lookup="row">velocities/mach</independentVar>
                    <tableData>
                        0.00 0.000
                        0.7 0.000
                        1.10 0.023
                        1.80 0.015
                    </tableData>
                </table>
            </product>
        </function>

        <function name="aero/force/Drag_flap">
            <description>Drag due to flaps</description>
            <product>
                <property>aero/qbar-psf</property>
                <property>metrics/Sw-sqft</property>
                <property>fcs/flap-pos-deg</property>
                <property>aero/function/kCDge</property>
                <value> 0.00100 </value>
            </product>
        </function>

        <function name="aero/force/Drag_gear">
            <description>Drag due to gear</description>
            <product>
                <property>aero/qbar-psf</property>
                <property>metrics/Sw-sqft</property>
                <property>gear/gear-pos-norm</property>
                <value>0.001</value>
            </product>
        </function>

        <function name="aero/force/Drag_speedbrake">
            <description>Drag due to speedbrakes</description>
            <product>
                <property>aero/qbar-psf</property>
                <property>metrics/Sw-sqft</property>
                <property>fcs/speedbrake-pos-norm</property>
                <value>0.024</value>
            </product>
        </function>

        <function name="aero/force/Drag_beta">
            <description>Drag due to sideslip</description>
            <product>
                <property>aero/qbar-psf</property>
                <property>metrics/Sw-sqft</property>
                <table>
                    <independentVar lookup="row">aero/beta-rad</independentVar>
                    <tableData>
                        -1.57 1.230
                        -0.26 0.050
                        0.00 0.000
                        0.26 0.050
                        1.57 1.230
                    </tableData>
                </table>
            </product>
        </function>

        <function name="aero/force/Drag_elevator">
            <description>Drag due to Elevator Deflection</description>
            <product>
                <property>aero/qbar-psf</property>
                <property>metrics/Sw-sqft</property>
                <abs>
                    <property>fcs/elevator-pos-norm</property>
                </abs>
                <value>0.04</value>
            </product>
        </function>

    </axis>

    <axis name="SIDE">

        <function name="aero/force/Side_beta">
            <description>Side force due to beta</description>
            <product>
                <property>aero/qbar-psf</property>
                <property>metrics/Sw-sqft</property>
                <property>aero/beta-rad</property>
                <value>-1</value>
            </product>
        </function>

    </axis>

    <axis name="ROLL">

        <function name="aero/moment/Roll_beta">
            <description>Roll moment due to beta</description>
            <product>
                <property>aero/qbar-psf</property>
                <property>metrics/Sw-sqft</property>
                <property>metrics/bw-ft</property>
                <property>aero/beta-rad</property>
                <value>-0.1</value>
            </product>
        </function>

        <function name="aero/moment/Roll_damp">
            <description>Roll moment due to roll rate</description>
            <product>
                <property>aero/qbar-psf</property>
                <property>metrics/Sw-sqft</property>
                <property>metrics/bw-ft</property>
                <property>aero/bi2vel</property>
                <property>velocities/p-aero-rad_sec</property>
                <value>-0.4</value>
            </product>
        </function>

        <function name="aero/moment/Roll_yaw">
            <description>Roll moment due to yaw rate</description>
            <product>
                <property>aero/qbar-psf</property>
                <property>metrics/Sw-sqft</property>
                <property>metrics/bw-ft</property>
                <property>aero/bi2vel</property>
                <property>velocities/r-aero-rad_sec</property>
                <value>0.15</value>
            </product>
        </function>

        <function name="aero/moment/Roll_aileron">
            <description>Roll moment due to aileron</description>
            <product>
                <property>aero/qbar-psf</property>
                <property>metrics/Sw-sqft</property>
                <property>metrics/bw-ft</property>
                <property>fcs/left-aileron-pos-rad</property>
                <value>0.17</value>
            </product>
        </function>

        <function name="aero/moment/Roll_rudder">
            <description>Roll moment due to rudder</description>
            <product>
                <property>aero/qbar-psf</property>
                <property>metrics/Sw-sqft</property>
                <property>metrics/bw-ft</property>
                <property>fcs/rudder-pos-rad</property>
                <value>0.01</value>
            </product>
        </function>

    </axis>

    <axis name="PITCH">

        <function name="aero/moment/Pitch_alpha">
            <description>Pitch moment due to alpha</description>
            <product>
                <property>aero/qbar-psf</property>
                <property>metrics/Sw-sqft</property>
                <property>metrics/cbarw-ft</property>
                <property>aero/alpha-rad</property>
                <!-- <value>-0.5</value> -->
                <value>-0.7</value>
                <!--from
                c172p-->
                <table>
                    <independentVar lookup="row">aero/alpha-deg</independentVar>
                    <tableData>
                        20 1
                        25 0.6
                        35 0.4
                        45 0.5
                        55 0.4
                        65 0.2
                        90 0.1
                    </tableData>
                </table>
            </product>
        </function>

        <function name="aero/moment/Pitch_elevator">
            <description>Pitch moment due to elevator</description>
            <product>
                <property>aero/qbar-psf</property>
                <property>metrics/Sw-sqft</property>
                <property>metrics/cbarw-ft</property>
                <property>fcs/elevator-pos-rad</property>
                <table>
                    <independentVar lookup="row">velocities/mach</independentVar>
                    <!-- <tableData>
                0.0     -1.900
                2.0     -1.000
              </tableData> -->
                    <tableData>
                        0.0 -1.100
                        2.0 -0.275
                    </tableData>
                </table>
            </product>
        </function>

        <function name="aero/moment/Pitch_damp">
            <description>Pitch moment due to pitch rate</description>
            <product>
                <property>aero/qbar-psf</property>
                <property>metrics/Sw-sqft</property>
                <property>metrics/cbarw-ft</property>
                <property>aero/ci2vel</property>
                <property>velocities/q-aero-rad_sec</property>
                <value>-12</value>
            </product>
        </function>

        <function name="aero/moment/Pitch_alphadot">
            <description>Pitch moment due to alpha rate</description>
            <product>
                <property>aero/qbar-psf</property>
                <property>metrics/Sw-sqft</property>
                <property>metrics/cbarw-ft</property>
                <property>aero/ci2vel</property>
                <property>aero/alphadot-rad_sec</property>
                <value>-7</value>
            </product>
        </function>

    </axis>

    <axis name="YAW">

        <function name="aero/moment/Yaw_beta">
            <description>Yaw moment due to beta</description>
            <product>
                <property>aero/qbar-psf</property>
                <property>metrics/Sw-sqft</property>
                <property>metrics/bw-ft</property>
                <property>aero/beta-rad</property>
                <value>0.12</value>
            </product>
        </function>

        <function name="aero/moment/Yaw_damp">
            <description>Yaw moment due to yaw rate</description>
            <product>
                <property>aero/qbar-psf</property>
                <property>metrics/Sw-sqft</property>
                <property>metrics/bw-ft</property>
                <property>aero/bi2vel</property>
                <property>velocities/r-aero-rad_sec</property>
                <value>-0.15</value>
            </product>
        </function>

        <function name="aero/moment/Yaw_rudder">
            <description>Yaw moment due to rudder</description>
            <product>
                <property>aero/qbar-psf</property>
                <property>metrics/Sw-sqft</property>
                <property>metrics/bw-ft</property>
                <property>fcs/rudder-pos-rad</property>
                <value>-0.05</value>
            </product>
        </function>

        <function name="aero/moment/Yaw_aileron">
            <description>Adverse yaw</description>
            <product>
                <property>aero/qbar-psf</property>
                <property>metrics/Sw-sqft</property>
                <property>metrics/bw-ft</property>
                <property>fcs/left-aileron-pos-rad</property>
                <value>-0.01</value>
            </product>
        </function>

    </axis>
</aerodynamics>
